// SBML level 2 version 4

function function_4_v7(k7, super)
  k7*super*super;
end

function function_4_v9(k9, NADrad)
  k9*NADrad*NADrad;
end

function function_4_v14(k14, Ar, NADH)
  k14*Ar*NADH;
end

function function_4_v2(k2, H2O2, per3)
  k2*H2O2*per3;
end

function function_4_v132(k13b, O2)
  k13b*O2;
end

function function_4_v6(k6, super, per3)
  k6*super*per3;
end

function function_4_v131(k13f, O2g)
  k13f*O2g;
end

function function_4_v3(k3, coI, ArH)
  k3*coI*ArH;
end

function function_4_v12(k12)
  k12;
end

function function_4_v4(k4, coII, ArH)
  k4*coII*ArH;
end

function function_4_v1(k1, NADH, O2)
  k1*NADH*O2;
end

function function_4_v5(k5, NADrad, O2)
  k5*NADrad*O2;
end

function function_4_v8(k8, coIII, NADrad)
  k8*coIII*NADrad;
end

function function_4_v10(k10, per3, NADrad)
  k10*per3*NADrad;
end

function function_4_v11(k11, per2, O2)
  k11*per2*O2;
end

model Olsen2003_peroxidase()
  // Model of peroxidase oscillations
  // Model from Olsen LF, Hauser MJ, Kummer U. (2003) "Mechanism of protection of peroxidase activity by oscillatory dynamics."Eur. J. Biochem. 270, 2796-804. It was first deposited in JWS and then in BioModels, finally it was imported into COPASI using the SBML import facility.
  // Notes of the BioModels curators:
  // The current model reproduce the figure 7, panel B of the paper. Note that there is a typo in the figure. The ordinates represent the concentration of peroxyde, as stated in the legend, and not of oxygen. The model has been tested in COPASI (http://www.copasi.org/, build 13).
  // Notes of the original version of the SBML file:
  // SBML level 2 code generated for the JWS Online project by Jacky Snoep using PySCeS
  // Run this model online at http://jjj.biochem.sun.ac.za
  // To cite JWS Online please refer to: Olivier, B.G. and Snoep, J.L. (2004) Web-based modelling using JWS Online, Bioinformatics, 20:2143-2144

  // Compartments:
  compartment compartment = 1;

  // Species:
  species NADH in compartment = 0;
  species O2 in compartment = 0;
  species H2O2 in compartment = 0;
  species per3 in compartment = 1.4;
  species coI in compartment = 0;
  species ArH in compartment = 500.0001;
  species coII in compartment = 0;
  species Ar in compartment = 0;
  species NADrad in compartment = 0;
  species super in compartment = 0;
  species coIII in compartment = 0;
  species per2 in compartment = 0;
  species $NAD2 in compartment = 0;
  species $NAD in compartment = 0;
  species $O2g in compartment = 12;
  species $NADHres in compartment = 0;

  // Reactions:
  v1: NADH + O2 -> H2O2 + $NAD; compartment*function_4_v1(k1, NADH, O2);
    k1 = 3e-6;
  v2: per3 + H2O2 -> coI; compartment*function_4_v2(k2, H2O2, per3);
    k2 = 18;
  v3: ArH + coI -> Ar + coII; compartment*function_4_v3(k3, coI, ArH);
    k3 = 0.15;
  v4: coII + ArH -> per3 + Ar; compartment*function_4_v4(k4, coII, ArH);
    k4 = 0.0052;
  v5: NADrad + O2 -> $NAD + super; compartment*function_4_v5(k5, NADrad, O2);
    k5 = 20;
  v6: per3 + super -> coIII; compartment*function_4_v6(k6, super, per3);
    k6 = 17;
  v7: 2 super -> H2O2 + O2; compartment*function_4_v7(k7, super);
    k7 = 20;
  v8: NADrad + coIII -> $NAD + coI; compartment*function_4_v8(k8, coIII, NADrad);
    k8 = 40;
  v9: 2 NADrad -> $NAD2; compartment*function_4_v9(k9, NADrad);
    k9 = 60;
  v10: per3 + NADrad -> per2 + $NAD; compartment*function_4_v10(k10, per3, NADrad);
    k10 = 1.8;
  v11: per2 + O2 -> coIII; compartment*function_4_v11(k11, per2, O2);
    k11 = 0.1;
  v12: $NADHres -> NADH; compartment*function_4_v12(k12);
    k12 = 0.08;
  v131: $O2g -> O2; compartment*function_4_v131(k13f, O2g);
    k13f = 0.006;
  v132: O2 -> $O2g; compartment*function_4_v132(k13b, O2);
    k13b = 0.006;
  v14: NADH + Ar -> NADrad + ArH; compartment*function_4_v14(k14, Ar, NADH);
    k14 = 0.7;

  // Unit definitions:
  unit length = metre;
  unit area = metre^2;
  unit volume = litre;
  unit time = second;
  unit substance = 1e-6 mole;
end
